New "LineCode.ug_1/0al" nphases=3 r1=0.56004 x1=0.24494 r0=0.96145 x0=0.26116 C1=68.882 C0=68.882 units=km baseFreq=60 normamps=150 emergamps=150 faultrate=0.1 pctperm=20 repair=3
New "LineCode.busbar" nphases=3 r1=0.0001 x1=0.0001 r0=0.0001 x0=0.0001 C1=0 C0=0 units=km baseFreq=60 normamps=2000 emergamps=2000 faultrate=0.1 pctperm=20 repair=3
New "LineCode.defaultsecondary" nphases=1 rmatrix=[  0.25000000 ] xmatrix=[  0.07600000 ] cmatrix=[  3.00000000 ] units=kft
