Edit Vsource.source bus1=181994.1 phases=1 pu=1.0 basekv=7.2428057 angle=-36.131847 R1=0 X1=0.001 R0=0 X0=0.001
New Vsource.Vph_2 bus1=181994.2 phases=1 pu=1.0 basekv=7.2534475 angle=-155.91672 R1=0 X1=0.001 R0=0 X0=0.001
New Vsource.Vph_3 bus1=181994.3 phases=1 pu=1.0 basekv=7.2328894 angle=84.063476 R1=0 X1=0.001 R0=0 X0=0.001
