! Example 1.2 Fault on the 2ndary spot network
Redirect "C:\Program Files\OpenDSS\Examples\DOC_TechNote\ExamplesMaster.dss"

! SLG Fault on Bus S203 (Spot Network 3)
New Fault.fault bus1=S203.1 bus2=S203.0 phases=1 r=0.0001

Solve
Show eventlog
