New "Isource.isource_0" bus1=675.1 phases=1 angle=240.000000 amps=219.969000 daily=pvloadshape
New "Isource.isource_1" bus1=675.2 phases=1 angle=120.000000 amps=65.000000 daily=pvloadshape
New "Isource.isource_2" bus1=675.3 phases=1 angle=0.000000 amps=169.120000 daily=pvloadshape
