Export monitors solar_power
Plot monitor object= solar_power channels=(2 4 6 )
Export monitors solar_power
Plot monitor object= solar_power channels=(1 3 5 )
Export monitors solar_voltage
Plot monitor object= solar_voltage channels=(1 3 5 )  bases=[277.13 277.13 277.13]

Export monitors solar
Plot monitor object= solar
