New "CapControl.cp-nr-613" capacitor=CP-NR-613 element=Line.175007 type=voltage PTratio=60 ONsetting=118 OFFsetting=121 Delay=75
New "CapControl.cp-85w-900" capacitor=CP-85W-900 element=Line.175060 type=voltage PTratio=60 ONsetting=120 OFFsetting=124 Delay=30
