New XYCurve.seasonsrat npts=46 xarray=[0,2880,2881,7296,7297,8760,11640,11641,16056,16057,17520,20400,20401,24816,24817,26280,29160,29161,33576,33577,35040,37920,37921,42336,42337,43800,46680,46681,51096,51097,52560,55440,55441,59856,59857,61320,64200,64201,68616,68617,70080,72960,72961,77376,77377,78840] yarray=[1,1,0,0,1,1,1,0,0,1,1,1,0,0,1,1,1,0,0,1,1,1,0,0,1,1,1,0,0,1,1,1,0,0,1,1,1,0,0,1,1,1,0,0,1,1]
set SeasonRating=true SeasonSignal=seasonsrat
